/COM,  Structural
!*
/PREP7
BLOCK,0,1,-0.05,0.05,-0.05,0.05
ET,1,SOLID186
MP,EX,1,7.31e10
MP,PRXY,1,0.33
ESIZE,0.025
VMESH,ALL
FINISH
/SOLU
NSEL,S,LOC,X,0
D,ALL,UX,0
NSEL,R,LOC,Y,0
D,ALL,UY,0
NSEL,R,LOC,Z,0
D,ALL,UZ,0
NSEL,S,LOC,X,1
NSEL,R,LOC,Y,0
NSEL,R,LOC,Z,0
F,ALL,FY,-5000
ALLSEL
SOLVE
FINISH
/POST1
/GRAPHICS,OFF
/ESHAPE,1
/DSCALE,ALL,1
/VIEW,1,,,1
PLNSOL,U,Y,0,1
